# OpenSim document version 40000
ScaleTool RajagopalModified2016_withArms:
  mass: 75.337 [kg]
  height: 1.89
  age: -1
  ModelScaler:
    apply: true
    scaling_order: measurements
    time_range: 3.41 3.66
    preserve_mass_distribution: true
    MeasurementSet:
      Measurement foot: apply=true
        MarkerPair: markers=(RHEE RTOE)
        MarkerPair: markers=(LHEE LTOE)
        BodyScale talus_r: axes=(X Y Z)
        BodyScale calcn_r: axes=(X Y Z)
        BodyScale toes_r: axes=(X Y Z)
        BodyScale talus_l: axes=(X Y Z)
        BodyScale calcn_l: axes=(X Y Z)
        BodyScale toes_l: axes=(X Y Z)
      Measurement tibia_r: apply=true
        MarkerPair: markers=(RKNE RANK)
        MarkerPair: markers=(RMKN RMED)
        BodyScale tibia_r: axes=(X Y Z)
      Measurement femur_r: apply=true
        MarkerPair: markers=(RHJC RKNE)
        BodyScale femur_r: axes=(X Y Z)
        BodyScale patella_r: axes=(X Y Z)
      Measurement tibia_l: apply=true
        MarkerPair: markers=(LKNE LANK)
        MarkerPair: markers=(LMKN LMED)
        BodyScale tibia_l: axes=(X Y Z)
      Measurement femur_l: apply=true
        MarkerPair: markers=(LHJC LKNE)
        BodyScale femur_l: axes=(X Y Z)
        BodyScale patella_l: axes=(X Y Z)
      Measurement pelvisXY: apply=true
        MarkerPair: markers=(RASI RPSI)
        MarkerPair: markers=(LASI LPSI)
        BodyScale pelvis: axes=(X Y)
      Measurement pelvisZ: apply=true
        MarkerPair: markers=(RHJC LHJC)
        BodyScale pelvis: axes=Z
      Measurement torsoXY: apply=true
        MarkerPair: markers=(RSHO RPSI)
        MarkerPair: markers=(LSHO LPSI)
        MarkerPair: markers=(C7 RPSI)
        MarkerPair: markers=(C7 LPSI)
        BodyScale torso: axes=(X Y)
        BodyScale scapulaPhantom_r: axes=(X Y)
        BodyScale scapulaPhantom_l: axes=(X Y)
      Measurement torsoZ: apply=true
        MarkerPair: markers=(RSHO LSHO)
        BodyScale torso: axes=Z
        BodyScale scapulaPhantom_r: axes=Z
        BodyScale scapulaPhantom_l: axes=Z
      Measurement humerus: apply=true
        MarkerPair: markers=(RSHO RELB)
        MarkerPair: markers=(LSHO LELB)
        BodyScale humerus_r: axes=(X Y Z)
        BodyScale humerus_l: axes=(X Y Z)
      Measurement radius: apply=true
        MarkerPair: markers=(RWRA RELB)
        MarkerPair: markers=(LWRA LELB)
        BodyScale ulna_r: axes=(X Y Z)
        BodyScale radius_r: axes=(X Y Z)
        BodyScale hand_r: axes=(X Y Z)
        BodyScale ulna_l: axes=(X Y Z)
        BodyScale radius_l: axes=(X Y Z)
        BodyScale hand_l: axes=(X Y Z)
  MarkerPlacer:
    apply: true
    time_range: 3.41 3.66
    max_marker_movement: -1
    IKTaskSet:
      IKMarkerTask RASI: apply=true weight=10
      IKMarkerTask LASI: apply=true weight=10
      IKMarkerTask RPSI: apply=true weight=10
      IKMarkerTask LPSI: apply=true weight=10
      IKMarkerTask RHJC: apply=true weight=10
      IKMarkerTask LHJC: apply=true weight=10
      IKMarkerTask RKNE: apply=true weight=10
      IKMarkerTask RMKN: apply=true weight=10
      IKMarkerTask RANK: apply=true weight=10
      IKMarkerTask RMED: apply=true weight=10
      IKMarkerTask RTOE: apply=true weight=10
      IKMarkerTask RHEE: apply=true weight=10
      IKMarkerTask LKNE: apply=true weight=10
      IKMarkerTask LMKN: apply=true weight=10
      IKMarkerTask LANK: apply=true weight=10
      IKMarkerTask LMED: apply=true weight=10
      IKMarkerTask LTOE: apply=true weight=10
      IKMarkerTask LHEE: apply=true weight=10
      IKMarkerTask RSHO: apply=true weight=5
      IKMarkerTask LSHO: apply=true weight=5
      IKMarkerTask C7: apply=true weight=20
      IKMarkerTask RELB: apply=true weight=1
      IKMarkerTask RWRA: apply=true weight=5
      IKMarkerTask RWRB: apply=true weight=5
      IKMarkerTask LELB: apply=true weight=1
      IKMarkerTask LWRA: apply=true weight=5
      IKMarkerTask LWRB: apply=true weight=5
      IKCoordinateTask [values shared by the 11 below unless stated]: apply=true weight=0.1 value_type=manual_value
          value=0
      IKCoordinateTask hip_flexion_r
      IKCoordinateTask hip_rotation_r: apply=false
      IKCoordinateTask knee_angle_r
      IKCoordinateTask ankle_angle_r: value=0.08726646
      IKCoordinateTask hip_flexion_l
      IKCoordinateTask hip_rotation_l: apply=false
      IKCoordinateTask knee_angle_l
      IKCoordinateTask ankle_angle_l: value=0.08726646
      IKCoordinateTask lumbar_extension
      IKCoordinateTask lumbar_bending
      IKCoordinateTask lumbar_rotation
